// SBML level 2 version 5

function _cc005897d2ef4df9932a30ee0b9e1ab6(volume, Et, kcat_for, S1, KM_S1, S2, KM_S2)
  volume*Et*kcat_for*(S1/KM_S1)*(S2/KM_S2)/((1 + (S1/KM_S1)^1)*(1 + (S2/KM_S2)^1));
end
_cc005897d2ef4df9932a30ee0b9e1ab6 is "Convenience (irreversible): 2 reactants";

function _7af6473a5b4a401aa860439f5dc05a86(volume, Et, kcat_for, kcat_rev, S1, KM_S1, S2, KM_S2, S3, KM_S3, P1, KM_P1, P2, KM_P2)
  volume*Et*(kcat_for*(S1/KM_S1)*(S2/KM_S2)*(S2/KM_S2)*(S3/KM_S3) - kcat_rev*(P1/KM_P1)*(P1/KM_P1)*(P2/KM_P2))/((1 + (S1/KM_S1)^1)*(1 + (S2/KM_S2)^1 + (S2/KM_S2)^2)*(1 + (S3/KM_S3)^1) + (1 + (P1/KM_P1)^1 + (P1/KM_P1)^2)*(1 + (P2/KM_P2)^1) - 1);
end
_7af6473a5b4a401aa860439f5dc05a86 is "Convenience (reversible): 3 reactants, 2 products";

function _4747dcd5b07749d8b071c16cb12092dd(volume, Et, kcat_for, kcat_rev, S1, KM_S1, S2, KM_S2, P1, KM_P1)
  volume*Et*(kcat_for*(S1/KM_S1)*(S2/KM_S2) - kcat_rev*(P1/KM_P1)*(P1/KM_P1))/((1 + (S1/KM_S1)^1)*(1 + (S2/KM_S2)^1) + 1 + (P1/KM_P1)^1 + (P1/KM_P1)^2 - 1);
end
_4747dcd5b07749d8b071c16cb12092dd is "Convenience (reversible): 2 reactants, 1 products";

function _131a1f3946bd4eda90460ea8ebc087f9(volume, Et, kcat_for, kcat_rev, S1, KM_S1, P1, KM_P1)
  volume*Et*(kcat_for*(S1/KM_S1) - kcat_rev*(P1/KM_P1))/(1 + (S1/KM_S1)^1 + 1 + (P1/KM_P1)^1 - 1);
end
_131a1f3946bd4eda90460ea8ebc087f9 is "Convenience (reversible): 1 reactants, 1 products";

function _a35ee319873f49f0a072d1b33ae6f340(volume, Et, kcat_for, S1, KM_S1, S2, KM_S2, I1, KI_I1)
  volume*Et*(KI_I1/(KI_I1 + I1))*kcat_for*(S1/KM_S1)*(S2/KM_S2)/((1 + (S1/KM_S1)^1)*(1 + (S2/KM_S2)^1));
end
_a35ee319873f49f0a072d1b33ae6f340 is "Convenience (irreversible): 2 reactants, 1 inhibitors";

function _df4c1dcb029e466aa17d7afe96270a13(volume, Et, kcat_for, S1, KM_S1)
  volume*Et*kcat_for*(S1/KM_S1)/(1 + (S1/KM_S1)^1);
end
_df4c1dcb029e466aa17d7afe96270a13 is "Convenience (irreversible): 1 reactants";

model main()

  // Compartments:
  compartment c = 1e-15;

  // Species:
  species $_CHEBI_57540 in c = 0.0026; _CHEBI_57540 is "NAD(1-)";  // cas:76961-04-1 inchi:InChI=1S/C21H27N7O14P2/c22-17-12-19(25-7-24-17)28(8-26-12)21-16(32)14(30)11(41-21)6-39-44(36,37)42-43(34,35)38-5-10-13(29)15(31)20(40-10)27-3-1-2-9(4-27)18(23)33/h1-4,7-8,10-11,13-16,20-21,29-32H,5-6H2,(H5-,22,23,24,25,33,34,35,36,37)/p-1/t10-,11-,13-,14-,15-,16-,20-,21-/m1/s1 CHEBI:57540
  species $_CHEBI_16526 in c = 0; _CHEBI_16526 is "Carbon dioxide";  // pubmed:23828359 kegg.drug:D00004 inchikey:CURLTUGMZLYLDI-UHFFFAOYSA-N hmdb:HMDB01967
  species _CHEBI_57557 in c = 0; _CHEBI_57557 is "(R)-5-diphosphonatomevalonate(4-)";  // inchi:InChI=1S/C6H14O10P2/c1-6(9,4-5(7)8)2-3-15-18(13,14)16-17(10,11)12/h9H,2-4H2,1H3,(H,7,8)(H,13,14)(H2,10,11,12)/p-4/t6-/m1/s1 CHEBI:57557
  species _CHEBI_16584 in c = 0; _CHEBI_16584 is "isopentenyl diphosphate";  // cas:358-71-4 lipidmaps:LMPR01010008 knapsack:C00000848 drugbank:DB04714
  species $_CHEBI_57945 in c = 8.3e-5; _CHEBI_57945 is "NADH(2-)";  // inchi:InChI=1S/C21H29N7O14P2/c22-17-12-19(25-7-24-17)28(8-26-12)21-16(32)14(30)11(41-21)6-39-44(36,37)42-43(34,35)38-5-10-13(29)15(31)20(40-10)27-3-1-2-9(4-27)18(23)33/h1,3-4,7-8,10-11,13-16,20-21,29-32H,2,5-6H2,(H2,23,33)(H,34,35)(H,36,37)(H2,22,24,25)/p-2/t10-,11-,13-,14-,15-,16-,20-,21-/m1/s1 CHEBI:57945
  species _CHEBI_58146 in c = 0; _CHEBI_58146 is "(R)-5-phosphonatomevalonate(3-)";  // inchi:InChI=1S/C6H13O7P/c1-6(9,4-5(7)8)2-3-13-14(10,11)12/h9H,2-4H2,1H3,(H,7,8)(H2,10,11,12)/p-3/t6-/m1/s1 CHEBI:58146
  species _CHEBI_43074 in c = 0; _CHEBI_43074 is "(3S)-3-hydroxy-3-methylglutaryl-CoA(5-)";  // inchi:InChI=1S/C27H44N7O20P3S/c1-26(2,21(40)24(41)30-5-4-15(35)29-6-7-58-17(38)9-27(3,42)8-16(36)37)11-51-57(48,49)54-56(46,47)50-10-14-20(53-55(43,44)45)19(39)25(52-14)34-13-33-18-22(28)31-12-32-23(18)34/h12-14,19-21,25,39-40,42H,4-11H2,1-3H3,(H,29,35)(H,30,41)(H,36,37)(H,46,47)(H,48,49)(H2,28,31,32)(H2,43,44,45)/p-5/t14-,19-,20-,21+,25-,27+/m1/s1 CHEBI:43074
  species $_CHEBI_24636 in c = 0; _CHEBI_24636 is "proton";  // cas:12408-02-5 kegg.compound:C00080 inchi:InChI=1S/p+1/i/hH CHEBI:24636
  species $_CHEBI_33019 in c = 0; _CHEBI_33019 is "diphosphate(3-)";  // inchi:InChI=1S/H4O7P2/c1-8(2,3)7-9(4,5)6/h(H2,1,2,3)(H2,4,5,6)/p-3 CHEBI:33019
  species _CHEBI_36464 in c = 0; _CHEBI_36464 is "(R)-mevalonate";  // kegg.compound:C00418 inchi:InChI=1S/C6H12O4/c1-6(10,2-3-7)4-5(8)9/h7,10H,2-4H2,1H3,(H,8,9)/p-1/t6-/m1/s1 CHEBI:36464
  species $_CHEBI_57288 in c = 0.00061; _CHEBI_57288 is "acetyl-CoA(4-)";  // inchi:InChI=1S/C23H38N7O17P3S/c1-12(31)51-7-6-25-14(32)4-5-26-21(35)18(34)23(2,3)9-44-50(41,42)47-49(39,40)43-8-13-17(46-48(36,37)38)16(33)22(45-13)30-11-29-15-19(24)27-10-28-20(15)30/h10-11,13,16-18,22,33-34H,4-9H2,1-3H3,(H,25,32)(H,26,35)(H,39,40)(H,41,42)(H2,24,27,28)(H2,36,37,38)/p-4/t13-,16-,17-,18+,22-/m1/s1 CHEBI:57288
  species _CHEBI_57623 in c = 0; _CHEBI_57623 is "prenyl diphosphate(3-)";  // cas:22679-02-3 pubmed:7753173 inchi:InChI=1S/C5H12O7P2/c1-5(2)3-4-11-14(9,10)12-13(6,7)8/h3H,4H2,1-2H3,(H,9,10)(H2,6,7,8)/p-3 CHEBI:57623
  species $_CHEBI_15377 in c = 0; _CHEBI_15377 is "water";  // wikipedia.en:Water pubmed:863843 kegg.drug:D00001 inchikey:XLYOFNOQVPJJNP-UHFFFAOYSA-N
  species $_CHEBI_30616 in c = 0.0096; _CHEBI_30616 is "ATP(4-)";  // inchi:InChI=1S/C10H16N5O13P3/c11-8-5-9(13-2-12-8)15(3-14-5)10-7(17)6(16)4(26-10)1-25-30(21,22)28-31(23,24)27-29(18,19)20/h2-4,6-7,10,16-17H,1H2,(H,21,22)(H,23,24)(H2,11,12,13)(H2,18,19,20)/p-4/t4-,6-,7-,10-/m1/s1 CHEBI:30616
  species $_CHEBI_43474 in c = 0; _CHEBI_43474 is "hydrogenphosphate";  // inchi:InChI=1S/H3O4P/c1-5(2,3)4/h(H3,1,2,3,4)/p-2 CHEBI:43474
  species $_CHEBI_456216 in c = 0.00056; _CHEBI_456216 is "ADP(3-)";  // inchi:InChI=1S/C10H15N5O10P2/c11-8-5-9(13-2-12-8)15(3-14-5)10-7(17)6(16)4(24-10)1-23-27(21,22)25-26(18,19)20/h2-4,6-7,10,16-17H,1H2,(H,21,22)(H2,11,12,13)(H2,18,19,20)/p-3/t4-,6-,7-,10-/m1/s1 CHEBI:456216
  species $_CHEBI_57287 in c = 0.0014; _CHEBI_57287 is "coenzyme A(4-)";  // cas:85-61-0 inchi:InChI=1S/C21H36N7O16P3S/c1-21(2,16(31)19(32)24-4-3-12(29)23-5-6-48)8-41-47(38,39)44-46(36,37)40-7-11-15(43-45(33,34)35)14(30)20(42-11)28-10-27-13-17(22)25-9-26-18(13)28/h9-11,14-16,20,30-31,48H,3-8H2,1-2H3,(H,23,29)(H,24,32)(H,36,37)(H,38,39)(H2,22,25,26)(H2,33,34,35)/p-4/t11-,14-,15-,16+,20-/m1/s1 CHEBI:57287
  species _CHEBI_57286 in c = 2.2e-5; _CHEBI_57286 is "acetoacetyl-CoA(4-)";  // inchi:InChI=1S/C25H40N7O18P3S/c1-13(33)8-16(35)54-7-6-27-15(34)4-5-28-23(38)20(37)25(2,3)10-47-53(44,45)50-52(42,43)46-9-14-19(49-51(39,40)41)18(36)24(48-14)32-12-31-17-21(26)29-11-30-22(17)32/h11-12,14,18-20,24,36-37H,4-10H2,1-3H3,(H,27,34)(H,28,38)(H,42,43)(H,44,45)(H2,26,29,30)(H2,39,40,41)/p-4/t14-,18-,19-,20+,24-/m1/s1 CHEBI:57286
  species _CHEBI_58057 in c = 0; _CHEBI_58057 is "geranyl diphosphate(3-)";  // inchi:InChI=1S/C10H20O7P2/c1-9(2)5-4-6-10(3)7-8-16-19(14,15)17-18(11,12)13/h5,7H,4,6,8H2,1-3H3,(H,14,15)(H2,11,12,13)/p-3/b10-7+ CHEBI:58057
  species _CHEBI_15383 in c = 0; _CHEBI_15383 is "(4S)-limonene";  // inchi:InChI=1S/C10H16/c1-8(2)10-6-4-9(3)5-7-10/h4,10H,1,5-7H2,2-3H3/t10-/m1/s1 CHEBI:15383
  species $_Q8LKJ2 in c = 1e-5; _Q8LKJ2 is "Geranyl diphosphate synthase";  // uniprot:Q8LKJ2
  species $_Q9FD70 in c = 1e-5; _Q9FD70 is "Acetyl-CoA acetyltransferase/HMG-CoA reductase";  // uniprot:Q9FD70
  species $_Q9FD52 in c = 1e-5; _Q9FD52 is "Phosphomevalonate kinase";  // uniprot:Q9FD52
  species $_Q46822 in c = 1e-5; _Q46822 is "Isopentenyl-diphosphate Delta-isomerase";  // uniprot:Q46822
  species $_Q9FD54 in c = 1e-5; _Q9FD54 is "Mevalonate kinase";  // uniprot:Q9FD54
  species $_Q9FD53 in c = 1e-5; _Q9FD53 is "Diphosphomevalonate decarboxylase";  // uniprot:Q9FD53
  species $_Q9FD71 in c = 1e-5; _Q9FD71 is "Hydroxymethylglutaryl-CoA synthase";  // uniprot:Q9FD71
  species $_Q40322 in c = 1e-5; _Q40322 is "4S-limonene synthase";  // uniprot:Q40322

  // Reactions:
  _MNXR55238: _CHEBI_16584 + _CHEBI_57623 => $_CHEBI_33019 + 3 $_CHEBI_24636 + _CHEBI_58057; _cc005897d2ef4df9932a30ee0b9e1ab6(c, _Q8LKJ2, _MNXR55238_kcat_for, _CHEBI_16584, _MNXR55238_KM__CHEBI_16584, _CHEBI_57623, _MNXR55238_KM__CHEBI_57623);  // modifiers: _Q8LKJ2; kegg.reaction:R01658 ec-code:2.5.1.1 rhea:22411 bigg.reaction:GPPSh
    _MNXR55238_kcat_for = 8.5e-2 per_sec; _MNXR55238_KM__CHEBI_16584 = 1.2e-5 M; _MNXR55238_KM__CHEBI_57623 = 2.2e-4 M;
  _MNXR14942: $_CHEBI_57287 + 2 $_CHEBI_57540 + _CHEBI_36464 -> $_CHEBI_24636 + $_CHEBI_24636 + 2 $_CHEBI_57945 + _CHEBI_43074; _7af6473a5b4a401aa860439f5dc05a86(c, _Q9FD70, _MNXR14942_kcat_for, _MNXR14942_kcat_rev, _CHEBI_57287, _MNXR14942_KM__CHEBI_57287, _CHEBI_57540, KM__CHEBI_57540, _CHEBI_36464, _MNXR14942_KM__CHEBI_36464, _CHEBI_57945, KM__CHEBI_57945, _CHEBI_43074, KM__CHEBI_43074); _MNXR14942 is "Acetyl-CoA acetyltransferase/HMG-CoA reductase";  // modifiers: _Q9FD70; kegg.reaction:R02081 ec-code:1.1.1.88 rhea:14836
    _MNXR14942_kcat_for = 17 per_sec; _MNXR14942_kcat_rev = 9.9 per_sec; _MNXR14942_KM__CHEBI_57287 = 7.3e-5 M; KM__CHEBI_57540 = 3.1e-4 M; _MNXR14942_KM__CHEBI_36464 = 4e-4 M; KM__CHEBI_57945 = 1.7e-4 M; KM__CHEBI_43074 = 1.8e-4 M;
  _MNXR69766: $_CHEBI_30616 + _CHEBI_58146 => $_CHEBI_456216 + _CHEBI_57557; _cc005897d2ef4df9932a30ee0b9e1ab6(c, _Q9FD52, _MNXR69766_kcat_for, _CHEBI_30616, _MNXR69766_KM__CHEBI_30616, _CHEBI_58146, KM__CHEBI_58146); _MNXR69766 is "Phosphomevalonate kinase";  // modifiers: _Q9FD52; kegg.reaction:R03245 ec-code:2.7.4.2 rhea:16344 bigg.reaction:PMEVKx
    _MNXR69766_kcat_for = 10 per_sec; _MNXR69766_KM__CHEBI_30616 = 2.3e-4 M; KM__CHEBI_58146 = 1.1e-4 M;
  _MNXR341: $_CHEBI_57287 + _CHEBI_57286 -> 2 $_CHEBI_57288; _4747dcd5b07749d8b071c16cb12092dd(c, _Q9FD70, _MNXR341_kcat_for, _MNXR341_kcat_rev, _CHEBI_57287, _MNXR341_KM__CHEBI_57287, _CHEBI_57286, _MNXR341_KM__CHEBI_57286, _CHEBI_57288, _MNXR341_KM__CHEBI_57288); _MNXR341 is "Acetyl-CoA acetyltransferase/HMG-CoA reductase";  // modifiers: _Q9FD70; kegg.reaction:R00238 ec-code:2.3.1.9 rhea:21039 bigg.reaction:KAT1
    _MNXR341_kcat_for = 1.3e2 per_sec; _MNXR341_kcat_rev = 2.9e1 per_sec; _MNXR341_KM__CHEBI_57287 = 1.1e-5 M; _MNXR341_KM__CHEBI_57286 = 2.5e-5 M; _MNXR341_KM__CHEBI_57288 = 3.3e-4 M;
  _MNXR69289: 3 $_CHEBI_24636 + _CHEBI_57623 -> _CHEBI_16584; _131a1f3946bd4eda90460ea8ebc087f9(c, _Q46822, _MNXR69289_kcat_for, _MNXR69289_kcat_rev, _CHEBI_57623, _MNXR69289_KM__CHEBI_57623, _CHEBI_16584, _MNXR69289_KM__CHEBI_16584); _MNXR69289 is "Isopentenyl-diphosphate Delta-isomerase";  // modifiers: _Q46822; kegg.reaction:R01123 ec-code:5.3.3.2 rhea:23287 bigg.reaction:IPDDIx
    _MNXR69289_kcat_for = 3.3e-1 per_sec; _MNXR69289_kcat_rev = 6.9e-1 per_sec; _MNXR69289_KM__CHEBI_57623 = 1.7e-5 M; _MNXR69289_KM__CHEBI_16584 = 1.2e-5 M;
  _MNXR3507: $_CHEBI_30616 + _CHEBI_36464 => $_CHEBI_24636 + $_CHEBI_456216 + _CHEBI_58146; _a35ee319873f49f0a072d1b33ae6f340(c, _Q9FD54, _MNXR3507_kcat_for, _CHEBI_30616, _MNXR3507_KM__CHEBI_30616, _CHEBI_36464, _MNXR3507_KM__CHEBI_36464, _CHEBI_58057, KI__CHEBI_58057); _MNXR3507 is "Mevalonate kinase";  // modifiers: _Q9FD54, _CHEBI_58057; kegg.reaction:R02245 ec-code:2.7.1.36 rhea:17068 bigg.reaction:MEVK1x
    _MNXR3507_kcat_for = 12 per_sec; _MNXR3507_KM__CHEBI_30616 = 8.8e-4 M; _MNXR3507_KM__CHEBI_36464 = 1.1e-4 M; KI__CHEBI_58057 = 2.8e-5 M;
  _MNXR68753: 3 $_CHEBI_24636 + $_CHEBI_30616 + _CHEBI_57557 => $_CHEBI_43474 + $_CHEBI_16526 + $_CHEBI_456216 + _CHEBI_16584; _cc005897d2ef4df9932a30ee0b9e1ab6(c, _Q9FD53, _MNXR68753_kcat_for, _CHEBI_30616, _MNXR68753_KM__CHEBI_30616, _CHEBI_57557, KM__CHEBI_57557); _MNXR68753 is "Diphosphomevalonate decarboxylase";  // modifiers: _Q9FD53; kegg.reaction:R01121 ec-code:4.1.1.33 rhea:23735 bigg.reaction:DPMVDx
    _MNXR68753_kcat_for = 1.2 per_sec; _MNXR68753_KM__CHEBI_30616 = 7.5e-4 M; KM__CHEBI_57557 = 1e-4 M;
  _MNXR2982: $_CHEBI_15377 + $_CHEBI_57288 + _CHEBI_57286 => $_CHEBI_24636 + $_CHEBI_57287 + _CHEBI_43074; _cc005897d2ef4df9932a30ee0b9e1ab6(c, _Q9FD71, _MNXR2982_kcat_for, _CHEBI_57288, _MNXR2982_KM__CHEBI_57288, _CHEBI_57286, _MNXR2982_KM__CHEBI_57286); _MNXR2982 is "Hydroxymethylglutaryl-CoA synthase";  // modifiers: _Q9FD71; kegg.reaction:R01978 ec-code:2.3.3.10 rhea:10191 bigg.reaction:MHGS
    _MNXR2982_kcat_for = 2.3e-2 per_sec; _MNXR2982_KM__CHEBI_57288 = 3e-6 M; _MNXR2982_KM__CHEBI_57286 = 1.2e-4 M;
  _R02013: _CHEBI_58057 => _CHEBI_15383 + $_CHEBI_33019; _df4c1dcb029e466aa17d7afe96270a13(c, _Q40322, _R02013_kcat_for, _CHEBI_58057, KM__CHEBI_58057); _R02013 is "4S-limonene synthase";  // modifiers: _Q40322; kegg.reaction:R02013 ec-code:4.2.3.16
    _R02013_kcat_for = 3.7e-2 per_sec; KM__CHEBI_58057 = 4.3e-6 M;

  // Unit definitions:
  unit per_sec = 1 / second;
  unit M = mole / litre;
  unit M_per_sec = mole / (litre * second);
end
